** Output from COS2ABQ translator version 2010
*HEADING

** PARTS
**
*PART,NAME=PART1
*NODE, NSET=NSET1
1,0.1801295280,0.3182643354,0.1837500036
2,0.1801295280,0.2850887775,0.2319065332
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*ELEMENT,TYPE=C3D10,ELSET=PART1_EG1
1,5488,5489,3186,5490,14554,28272,28273,14553,14545,28271
2,5491,5492,3182,5493,14530,28295,28296,14529,14526,28294
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*ORIENTATION,NAME=RECT1,DEFINITION=COORDINATES,SYSTEM=RECTANGULAR
1.0,0.0,0.0,0.0,1.0,0.0
0.0,0.0,0.0
*SOLID SECTION,ELSET=PART1_EG1,MATERIAL=MAT1, ORIENT=RECT1
*END PART
** ASSEMBLY
*ASSEMBLY, NAME=ASSEMBLY
*INSTANCE, NAME=PART1-1, PART=PART1
*END INSTANCE
*END ASSEMBLY
*MATERIAL,NAME=MAT1
*ELASTIC
0.100000E+05,0.450000E+00,
*DENSITY
0.960000E+03,
*END STEP
