# OpenSim document version 30000
Model ScapulothoracicJoint_Shoulder:
  length_units: meters
  force_units: N
  gravity: 0 -9.80665 0
  credits:
    Model constructed by Ricardo Matias and Ajay Seth. Scapulothoracic joint developed by Seth et al. [1]; segment dimensions and joint locations were obtained from Holzbaur et al. [2], and segment inertial properties obtained from Breteler et al. [3]
  publications:
    [1] Seth A, Matias R, Veloso A, Delp SL. A biomechanical model of the scapulothoracic joint to accurately capture scapula kinematics during shoulder movements. PLoS One. 2015.
    [2] Holzbaur KRS, Murray WM, Delp SL. A Model of the Upper Extremity for Simulating Musculoskeletal Surgery and Analyzing Neuromuscular Control. Ann Biomed Eng 33:829–840. 2005.
    [3] Breteler KMD, Spoor CW, Van der Helm FC. Measuring muscle and joint geometry parameters of a shoulder for modeling purposes. J Biomech 32:1191–7. 1999.
  BodySet:
    Body ground: mass=0 mass_center=(0 0 0) inertia_xx=0 inertia_yy=0 inertia_zz=0
    Body thorax: mass=20 mass_center=(-0.0591 -0.1486 0) inertia_xx=1.29841 inertia_yy=0.55245 inertia_zz=1.29841
        meshes=(thorax.vtp groundspine.vtp)
      CustomJoint ground_thorax: parent_body=ground location_in_parent=(0 0 0) location=(0 0 0)
        Coordinate ground_thorax_rot_x: motion_type=rotational default_value=0 range=(-1.570796 1.570796) clamped=true
            locked=true
        Coordinate ground_thorax_rot_y: motion_type=rotational default_value=0 range=(-1.570796 1.570796) clamped=true
            locked=true
        Coordinate ground_thorax_rot_z: motion_type=rotational default_value=0 range=(-1.570796 1.570796) clamped=true
            locked=true
        Coordinate ground_thorax_tx: motion_type=translational default_value=0 range=(-1 1) clamped=false locked=true
        Coordinate ground_thorax_ty: motion_type=translational default_value=0 range=(-1 1) clamped=false locked=true
        Coordinate ground_thorax_tz: motion_type=translational default_value=0 range=(-1 1) clamped=false locked=true
        SpatialTransform:
          TransformAxis rotation1: coordinates=ground_thorax_rot_x axis=(1 0 0) LinearFunction(coefficients=1 0)
          TransformAxis rotation2: coordinates=ground_thorax_rot_y axis=(0 1 0) LinearFunction(coefficients=1 0)
          TransformAxis rotation3: coordinates=ground_thorax_rot_z axis=(0 0 1) LinearFunction(coefficients=1 0)
          TransformAxis translation1: coordinates=ground_thorax_tx axis=(1 0 0) LinearFunction(coefficients=1 0)
          TransformAxis translation2: coordinates=ground_thorax_ty axis=(0 1 0) LinearFunction(coefficients=1 0)
          TransformAxis translation3: coordinates=ground_thorax_tz axis=(0 0 1) LinearFunction(coefficients=1 0)
      WrapEllipsoid ScapulothoracicEllipsoid: translation=(-0.02 -0.0173 0.0609) quadrant=all
          dimensions=(0.07 0.15 0.07)
    Body clavicle: mass=0.156 mass_center=(-0.02172 0.01007 0.06704) inertia_xx=6.4e-6 inertia_yy=2.63e-5
        inertia_zz=2.43e-5 inertia_xy=-6.7e-6 inertia_xz=-9.5e-6 inertia_yz=2.9e-6 meshes=clavicle.vtp
      CustomJoint sternoclavicular: parent_body=thorax location_in_parent=(0.006325 0.00693 0.025465) location=(0 0 0)
        Coordinate clav_prot: motion_type=rotational default_value=0 range=(-0.7853982 0.7853982) clamped=true
        Coordinate clav_elev: motion_type=rotational default_value=0 range=(-0.7853982 0.7853982) clamped=true
        SpatialTransform: axes_held_at_zero=(rotation3 translation1 translation2 translation3)
          TransformAxis rotation1: coordinates=clav_prot axis=(0.0153 0.9892987 -0.1451)
              LinearFunction(coefficients=1 0)
          TransformAxis rotation2: coordinates=clav_elev axis=(-0.9944725 0 -0.104997) LinearFunction(coefficients=1 0)
    Body scapula: mass=0.7054 mass_center=(-0.04612 -0.0319 -0.04565) inertia_xx=0.001 inertia_yy=0.001
        inertia_zz=0.001 meshes=scapula.vtp
      ScapulothoracicJoint scapulothoracic: parent_body=thorax location_in_parent=(-0.02 -0.0173 0.07)
          orientation_in_parent=(0 -0.87 0) location=(-0.05982 -0.03904 -0.056) orientation=(-0.5181 -1.1416 -0.2854)
          thoracic_ellipsoid_radii_x_y_z=(0.07 0.15 0.07) scapula_winging_axis_origin=(0 0)
          scapula_winging_axis_direction=0 [radians]
        Coordinate scapula_abduction: motion_type=rotational default_value=0 range=(-0.7853982 0.7853982) clamped=true
        Coordinate scapula_elevation: motion_type=rotational default_value=0 range=(-0.7853982 0.7853982) clamped=true
        Coordinate scapula_upward_rot: motion_type=rotational default_value=0 range=(-0.7853982 0.7853982) clamped=true
        Coordinate scapula_winging: motion_type=rotational default_value=0 range=(-0.7853982 0.7853982) clamped=false
    Body humerus: mass=2.0519 mass_center=(0.00537 -0.11493 -0.00261) inertia_xx=0.0132 inertia_yy=0.001988
        inertia_zz=0.0132 meshes=humerus.vtp
      CustomJoint glenohumeral: parent_body=scapula location_in_parent=(-0.00955 -0.034 0.009) location=(0 0 0)
        Coordinate shoulder_elv: motion_type=rotational default_value=0.1745329 range=(-1.570796 2.53) clamped=false
        Coordinate plane_of_elev: motion_type=rotational default_value=0 range=(-1.570796 3.141593) clamped=true
        Coordinate axial_rot: motion_type=rotational default_value=0 range=(-3.141593 3.141593) clamped=true
        SpatialTransform: axes_held_at_zero=(translation1 translation2 translation3)
          TransformAxis rotation1: coordinates=shoulder_elv axis=(-0.993 -0.0793 0.0879)
              LinearFunction(coefficients=1 0)
          TransformAxis rotation2: coordinates=plane_of_elev axis=(0.0828 0.0654 0.9944)
              LinearFunction(coefficients=1 0)
          TransformAxis rotation3: coordinates=axial_rot axis=(-0.0846 0.9947 -0.0584) LinearFunction(coefficients=1 0)
    Body ulna: mass=0.5464 mass_center=(-0.00927581 -0.105108 0.0261565) inertia_xx=0.0030585 inertia_yy=0.00045325
        inertia_zz=0.0030585 meshes=ulna.vtp
      CustomJoint elbow: parent_body=humerus location_in_parent=(0.0061 -0.2904 -0.0123) location=(0 0 0)
        Coordinate elbow_flexion: motion_type=rotational default_value=0 range=(0 3.141593) clamped=false locked=true
        SpatialTransform: axes_held_at_zero=(rotation1 rotation2 translation1 translation2 translation3)
          TransformAxis rotation3: coordinates=elbow_flexion axis=(0.04940001 0.03660001 0.9981083)
              LinearFunction(coefficients=1 0)
    Body radius: mass=0.5464 mass_center=(0.0154894 -0.104396 0.0138558) inertia_xx=0.0030585 inertia_yy=0.00045325
        inertia_zz=0.0030585 meshes=radius.vtp
      CustomJoint radioulnar: parent_body=ulna location_in_parent=(0.0004 -0.011503 0.019999) location=(0 0 0)
        Coordinate pro_sup: motion_type=rotational default_value=-1.570796 range=(-1.570796 1.570796) clamped=false
            locked=true
        SpatialTransform: axes_held_at_zero=(rotation1 rotation3 translation1 translation2 translation3)
          TransformAxis rotation2: coordinates=pro_sup axis=(-0.01716099 0.9926656 -0.119668)
              LinearFunction(coefficients=1 0)
    Body hand: mass=0.525 mass_center=(0.0006 -0.0905 -0.0365) inertia_xx=0.0006387 inertia_yy=0.0001904
        inertia_zz=0.0006387
        meshes=(lunate.vtp scaphoid.vtp pisiform.vtp triquetrum.vtp capitate.vtp trapezium.vtp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)
      WeldJoint rc: parent_body=radius location_in_parent=(0.018 -0.242 0.025) location=(0 0 0)
  ConstraintSet:
    PointConstraint AC: body_1=clavicle body_2=scapula location_body_1=(-0.02924 0.02024 0.12005)
        location_body_2=(-0.01357 0.00011 -0.01523)
  ForceSet:
    CoordinateLimitForce [values shared by the 5 below unless stated]: upper_stiffness=20 [N*m/degree]
        lower_stiffness=20 [N*m/degree] damping=1 transition=10 [degrees]
    CoordinateLimitForce ClavicleElevationLimits: coordinate=clav_elev upper_limit=25 [degrees]
        lower_limit=-20 [degrees]
    CoordinateLimitForce ClavicleProtractionLimits: coordinate=clav_prot upper_limit=25 lower_limit=-10
    CoordinateLimitForce ScapulaRotationLimits: coordinate=scapula_upward_rot upper_limit=50 lower_limit=-20
    CoordinateLimitForce ShoulderRotationLimits: coordinate=shoulder_elv upper_limit=180 lower_limit=-85
    CoordinateLimitForce ElbowFlexLimit: coordinate=elbow_flexion upper_limit=140 lower_limit=0
  MarkerSet:
    Marker ij: thorax (0 0 0)
    Marker c7: thorax (-0.0899063 0.0327569 0)
    Marker t8: thorax (-0.111155 -0.154433 0)
    Marker px: thorax (0.0697635 -0.164311 0)
    Marker ClavicleMassCenter: clavicle (-0.02172 0.01007 0.06704)
    Marker acc: clavicle (-0.028301 0.018552 0.117034)
    Marker sc: clavicle (0 0 0)
    Marker ScapulaMassCenter: scapula (-0.04612 -0.0319 -0.04565)
    Marker ScapulaThoracicContactPt: scapula (-0.05982 -0.03904 -0.056)
    Marker ac: scapula (-0.0119247 -0.00196687 -0.0176399)
    Marker ai: scapula (-0.115393 -0.116437 -0.0826482)
    Marker ts: scapula (-0.0921861 -0.00870938 -0.095417)
    Marker aa: scapula (-0.044807 -4.28397e-5 0.00490913)
    Marker HumerusMassCenter: humerus (0.00537 -0.11493 -0.00261)
    Marker gu: humerus (0 0 0)
    Marker EpL: humerus (0.00134695 -0.285625 0.022249)
    Marker EpM: humerus (0.00148415 -0.282015 -0.0446513)
    Marker centelbow: humerus (0.0009 -0.2842 -0.0097)
    Marker centijc7: thorax (-0.0415 0.0163 0)
    Marker centpxt8: thorax (-0.0207 -0.1601 0.0004)
    Marker ijc: clavicle (-0.00953974 -0.00184817 -0.0253392)
