# OpenSim document version 30000
Model double_pendulum:
  credits: Conlain Kelly
  publications: For projectchrono
  length_units: meters
  force_units: N
  gravity: 0 -9.80665 0
  BodySet:
    Body ground: mass=0 mass_center=(0 0 0) inertia_xx=0 inertia_yy=0 inertia_zz=0 meshes=Unassigned
    Body ball1: mass=1 mass_center=(0 0 0) inertia_xx=1 inertia_yy=1 inertia_zz=1 meshes=(cylinder.vtp sphere.vtp)
      BallJoint sph1: parent_body=ground location_in_parent=(.25 0 0) location=(0 1 0)
        Coordinate q1: motion_type=rotational default_value=0 range=(-1.570796 1.570796) clamped=false
        Coordinate q2: motion_type=rotational default_value=0 range=(-1.570796 1.570796) clamped=false
        Coordinate q3: motion_type=rotational default_value=0 range=(-1.570796 1.570796) clamped=false
    Body ball2: mass=1 mass_center=(0 0 0) inertia_xx=1 inertia_yy=1 inertia_zz=1 meshes=(cylinder.vtp sphere.vtp)
      BallJoint sph1: parent_body=ground location_in_parent=(.5 0 0) location=(0 1 0)
        Coordinate q1: motion_type=rotational default_value=0 range=(-1.570796 1.570796) clamped=false
        Coordinate q2: motion_type=rotational default_value=0 range=(-1.570796 1.570796) clamped=false
        Coordinate q3: motion_type=rotational default_value=0 range=(-1.570796 1.570796) clamped=false
    Body ball3: mass=1 mass_center=(0 0 0) inertia_xx=1 inertia_yy=1 inertia_zz=1 meshes=(cylinder.vtp sphere.vtp)
      BallJoint sph1: parent_body=ground location_in_parent=(.75 0 0) location=(0 1 0)
        Coordinate q1: motion_type=rotational default_value=0 range=(-1.570796 1.570796) clamped=false
        Coordinate q2: motion_type=rotational default_value=0 range=(-1.570796 1.570796) clamped=false
        Coordinate q3: motion_type=rotational default_value=0 range=(-1.570796 1.570796) clamped=false
    Body ball4: mass=1 mass_center=(0 0 0) inertia_xx=1 inertia_yy=1 inertia_zz=1 meshes=(cylinder.vtp sphere.vtp)
      BallJoint sph1: parent_body=ground location_in_parent=(1 0 0) location=(0 1 0)
        Coordinate q1: motion_type=rotational default_value=0 range=(-1.570796 1.570796) clamped=false
        Coordinate q2: motion_type=rotational default_value=0 range=(-1.570796 1.570796) clamped=false
        Coordinate q3: motion_type=rotational default_value=0 range=(-1.570796 1.570796) clamped=false
    Body ball5: mass=1 mass_center=(0 0 0) inertia_xx=1 inertia_yy=1 inertia_zz=1 meshes=(cylinder.vtp sphere.vtp)
      BallJoint sph1: parent_body=ground location_in_parent=(1.25 0 0) location=(0 1 0)
        Coordinate q1: motion_type=rotational default_value=0 range=(-1.570796 1.570796) clamped=false
        Coordinate q2: motion_type=rotational default_value=0 range=(-1.570796 1.570796) clamped=false
        Coordinate q3: motion_type=rotational default_value=1 range=(-1.570796 1.570796) clamped=false
  ForceSet:
    CoordinateActuator Torq1: coordinate=q1 optimal_force=1
    CoordinateActuator Torq2: coordinate=q2 optimal_force=1
