# OpenSim document version 30000
Model double_pendulum:
  credits: Ajay Seth
  publications: For testing
  length_units: meters
  force_units: N
  gravity: 0 0 0
  BodySet:
    Body ground: mass=0 mass_center=(0 0 0) inertia_xx=0 inertia_yy=0 inertia_zz=0 meshes=Unassigned
    Body rod1: mass=1 mass_center=(0 0 0) inertia_xx=1 inertia_yy=1 inertia_zz=1 meshes=(cylinder.vtp sphere.vtp)
      PinJoint pin1: parent_body=ground location_in_parent=(0 0 0) location=(0 0.5 0)
        Coordinate q1: motion_type=rotational default_value=-0.7853982 range=(-1.570796 1.570796) clamped=false
  ControllerSet:
    PrescribedController prescribedcontroller_: actuator_list=grav
      FunctionSet ControlFunctions: f=Constant(value=1)
  ForceSet:
    TorqueActuator grav: bodyA=ground bodyB=rod1 torque_is_global=true axis=(0 0 1) optimal_force=9.8
