# OpenSim document version 30000
Model triple_pendulum:
  credits: Ajay Seth
  publications: For testing
  length_units: meters
  force_units: N
  gravity: 0 -9.80665 0
  BodySet:
    Body ground: mass=0 mass_center=(0 0 0) inertia_xx=0 inertia_yy=0 inertia_zz=0 meshes=Unassigned
    Body rod1: mass=1 mass_center=(0 0 0) inertia_xx=1 inertia_yy=1 inertia_zz=1 meshes=(cylinder.vtp sphere.vtp)
      PinJoint pin1: parent_body=ground location_in_parent=(0 0 0) location=(0 0.5 0)
        Coordinate q1: motion_type=rotational default_value=-0.7853982 range=(-1.570796 1.570796) clamped=false
    Body rod2: mass=1 mass_center=(0 0 0) inertia_xx=1 inertia_yy=1 inertia_zz=1 meshes=(cylinder.vtp sphere.vtp)
      CustomJoint pin2: parent_body=rod1 location_in_parent=(0 0 0) location=(0 0.5 0)
        Coordinate q1: motion_type=rotational default_value=-.754 range=(-1.570796 1.570796) clamped=false
        SpatialTransform:
          TransformAxis rotation1: coordinates=q1 axis=(1 0 0) LinearFunction(coefficients=.01 .2)
          TransformAxis rotation2: axis=(0 1 0) LinearFunction(coefficients=0 0)
          TransformAxis rotation3: axis=(0 0 1) LinearFunction(coefficients=0 0)
          TransformAxis translation1: axis=(1 0 0) LinearFunction(coefficients=0 0)
          TransformAxis translation2: axis=(0 1 0) LinearFunction(coefficients=0 0)
          TransformAxis translation3: axis=(0 0 1) LinearFunction(coefficients=0 0)
    Body rod3: mass=1 mass_center=(0 0 0) inertia_xx=1 inertia_yy=1 inertia_zz=1 meshes=(cylinder.vtp sphere.vtp)
      PinJoint pin3: parent_body=rod2 location_in_parent=(0 0 0) location=(0 0.5 0)
        Coordinate q1: motion_type=rotational default_value=.54 range=(-1.570796 1.570796) clamped=false
        SpatialTransform:
          TransformAxis rotation1: coordinates=q1 axis=(1 0 0) LinearFunction(coefficients=2 1)
          TransformAxis rotation2: axis=(0 1 0) LinearFunction(coefficients=0 0)
          TransformAxis rotation3: axis=(0 0 1) LinearFunction(coefficients=0 0)
          TransformAxis translation1: axis=(1 0 0) LinearFunction(coefficients=0 0)
          TransformAxis translation2: axis=(0 1 0) LinearFunction(coefficients=0 0)
          TransformAxis translation3: axis=(0 0 1) LinearFunction(coefficients=0 0)
