** Output from COS2ABQ translator version 2010
*HEADING

** PARTS
**
*PART,NAME=PART1
*NODE, NSET=NSET1
1,-.1104936004,0.5751289129,-.2582403719
2,-.3987055644E-01,0.6298547983,-.6404489279E-01
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*ELEMENT,TYPE=C3D10,ELSET=PART1_EG1
1,3093,3094,268,1516,12825,12826,12827,12828,12829,9749
2,3093,1509,3095,262,12830,12831,12832,12833,12834,12835
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*ORIENTATION,NAME=RECT1,DEFINITION=COORDINATES,SYSTEM=RECTANGULAR
1.0,0.0,0.0,0.0,1.0,0.0
0.0,0.0,0.0
*SOLID SECTION,ELSET=PART1_EG1,MATERIAL=MAT1, ORIENT=RECT1
*END PART
** ASSEMBLY
*ASSEMBLY, NAME=ASSEMBLY
*INSTANCE, NAME=PART1-1, PART=PART1
*END INSTANCE
*NSET,NSET=BC_NSET1,INSTANCE=PART1-1
751,752,753,754,755,756
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*NSET,NSET=BC_NSET2,INSTANCE=PART1-1
2140,2141,2142,2143,2144,2145
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*END ASSEMBLY
*MATERIAL,NAME=MAT1
*ELASTIC
0.610000E+07,0.490000E+00,
*PLASTIC
0.92374E+07,0.0000,0.0000
*EXPANSION
0.670000E-03,
*DENSITY
0.100000E+04,
*CONDUCTIVITY
0.140000E+00,
*STEP,SOLVER=ITERATIVE
LOAD CASE NUMBER 1
*STATIC
*BOUNDARY
ASSEMBLY.BC_NSET1,1,1
ASSEMBLY.BC_NSET1,2,2
ASSEMBLY.BC_NSET1,3,3
ASSEMBLY.BC_NSET2,3,3
*END STEP
