** Output from COS2ABQ translator version 2011
*HEADING

** PARTS
**
*PART,NAME=PART1
*NODE, NSET=NSET1
1,-.8126591891E-01,0.7820817083E-01,0.7000000030E-01
2,-.8126591891E-01,0.6017285958E-01,0.7000000030E-01
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*ELEMENT,TYPE=DC3D10,ELSET=PART1_EG1
1,1268,1269,1270,1271,24950,24937,24949,24948,24936,24922
2,1268,1272,1269,1273,24947,24935,24950,24946,24897,24934
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*SOLID SECTION,ELSET=PART1_EG1,MATERIAL=MAT1
*END PART
** ASSEMBLY
*ASSEMBLY, NAME=ASSEMBLY
*INSTANCE, NAME=PART1-1, PART=PART1
*END INSTANCE
*NSET,NSET=TEMP_NSET1,INSTANCE=PART1-1
451,452,453,454,455,456
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*NSET,NSET=TEMP_NSET2,INSTANCE=PART1-1
1120,1121,1122,1123,1124,1125
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*END ASSEMBLY
*MATERIAL,NAME=MAT1
*ELASTIC
0.210000E+12,0.280000E+00,
*PLASTIC
0.62042E+09,0.0000,0.0000
*EXPANSION
0.130000E-04,
*DENSITY
0.770000E+04,
*CONDUCTIVITY
0.500000E+02,
*SPECIFIC HEAT
0.460000E+03,
** PHYSICAL CONSTANTS
*PHYSICAL CONSTANTS, ABSOLUTE ZERO=0.0000000, STEFAN BOLTZMANN=0.56703001E-07
*STEP,solver=DDM
LOAD CASE NUMBER 1
*HEAT TRANSFER,STEADY STATE
1.0000,0.0000,
*BOUNDARY,OP=NEW
TEMP_NSET1,11,11,0.200000E+01
*BOUNDARY,OP=NEW
TEMP_NSET2,11,11,0.230000E+02
*END STEP
